! RSV_V0_ANTYPEGMNA

/prep7
MPDELE,ALL,MAT_STEEL
STEEL, MAT_STEEL, MAT_STEEL_E, MAT_STEEL_fy,,, MAT_STEEL_dens, MAT_STEEL_Poisson

/solu
ANTYPE,0,NEW
OUTRES,ERASE
OUTRES,ALL,all

RSV_V0_BC

NLGEOM,ON
KBC,0

ALLSEL
SAVE,,,,ALL

/uis,ABORT,OFF
KEYW,pr_sgui,1
LSSOLVE,1,LSMax
KEYW,pr_sgui,0
