! RESERV_V0_MODEL

/prep7
IMMED,0
/uis,REPLOT,0
/window,1,OFF

RSV_V0_ATTR

RSV_V0_SM

RSV_V0_FEM

/window,1,ON

RSV_V0_SOLVE


/post1
SET,LAST
/eshape,0
/view,1,1,1,1
/dscale,,1e2
/edge,,0
/device,VECTOR,OFF
/gline,,-1
PLNSOL,S,EQV
/type,,3


RSV_V0_POST
